FINISH              ! 结束当前模块 xin
/CLEAR , START       ! 清除数据库，开始新的分析
!========== 定义参数 (Preprocessor) ==========
str = '%z%h=%h%T1=%T1%T2=%T2%'
! ===== 1. 设置工作目录和文件名 =====
/MKDIR, 'D:/result/z =%z% h=%h% T1=%T1% T2=%T2%'     ! 创建项目目录（如不存在）
/CWD,'D:/result/z =%z% h=%h% T1=%T1% T2=%T2%'        ! 设置工作目录
/FILNAME,str, 1     ! 设置文件名前缀
! ========== 前处理 (Preprocessor) ==========
/PREP7              ! 进入前处理器
! 1. 定义材料属性 (钢)
MP, EX, 1, 210000   ! 杨氏模量 (Pa)
MP, PRXY, 1, 0.3    ! 泊松比
MP, DENS, 1, 7.85e-9   ! 密度 (kg/m³)

! 2. 定义单元类型 (壳单元SHELL181)
ET, 1, SHELL181     ! 选择壳单元类型
KEYOPT, 1, 8, 2     ! 设置存储应力和应变
K , 1 , -2500.0 , 500.0 , 0
K , 2 , -2000.0 , 1000.0 , 0
K , 3 , 2000.0 , 1000.0 , 0
K , 4 , 2500.0 , 500.0 , 0
K , 5 , 2500.0 , -500.0 , 0
K , 6 , 2000.0 , -1000.0 , 0
K , 7 , -2000.0 , -1000.0 , 0
K , 8 , -2500.0 , -500.0 , 0
K , 9 , -2500.0 , 500.0 , 3000.0
K , 10 , -2000.0 , 1000.0 , 3000.0
K , 11 , 2000.0 , 1000.0 , 3000.0
K , 12 , 2500.0 , 500.0 , 3000.0
K , 13 , 2500.0 , -500.0 , 3000.0
K , 14 , 2000.0 , -1000.0 , 3000.0
K , 15 , -2000.0 , -1000.0 , 3000.0
K , 16 , -2500.0 , -500.0 , 3000.0
A ,9,10,2,1
A ,10,11,3,2
A ,11,12,4,3
A ,12,13,5,4
A ,13,14,6,5
A ,14,15,7,6
A ,15,16,8,7
A ,16,9,1,8
ASEL, ALL
! 创建新组件侧壁
CM, CEBI, AREA
ASEL, NONE
K , 17 , -2700.0 , 582.842712474619 , 0
K , 18 , -2082.842712474619 , 1200.0 , 0
K , 19 , 2082.842712474619 , 1200.0 , 0
K , 20 , 2700.0 , 582.842712474619 , 0
K , 21 , 2700.0 , -582.842712474619 , 0
K , 22 , 2082.842712474619 , -1200.0 , 0
K , 23 , -2082.842712474619 , -1200.0 , 0
K , 24 , -2700.0 , -582.842712474619 , 0
K , 25 , -2700.0 , 582.842712474619 , 3000.0
K , 26 , -2082.842712474619 , 1200.0 , 3000.0
K , 27 , 2082.842712474619 , 1200.0 , 3000.0
K , 28 , 2700.0 , 582.842712474619 , 3000.0
K , 29 , 2700.0 , -582.842712474619 , 3000.0
K , 30 , 2082.842712474619 , -1200.0 , 3000.0
K , 31 , -2082.842712474619 , -1200.0 , 3000.0
K , 32 , -2700.0 , -582.842712474619 , 3000.0
A , 1, 2, 3, 4, 5, 6, 7, 8
BOTTOM_AREA = _RETURN
A , 17,18,19,20,21,22,23,24
RIM_AREA = _RETURN
ASBA, RIM_AREA, BOTTOM_AREA
! 创建新组件箱底沿
CM, BOTTOM_RIM, AREA
ASEL, NONE
A , 16,15,14,13,12,11,10,9
UP_AREA = _RETURN
A , 32,31,30,29,28,27,26,25
UP_RIM_AREA = _RETURN
ASBA, UP_RIM_AREA, UP_AREA
! 创建新组件箱盖沿
CM, TOP_RIM, AREA
ASEL, NONE
K , 33 , 517.0 , 1000.0 , 3000.0
K , 34 , 517.0 , -1000.0 , 3000.0
K , 35 , 517.0 , -1000.0 , 3120.0
K , 36 , 517.0 , 1000.0 , 3120.0
K , 37 , 1017.0 , 1000.0 , 3000.0
K , 38 , 1017.0 , -1000.0 , 3000.0
K , 39 , 1017.0 , -1000.0 , 3120.0
K , 40 , 1017.0 , 1000.0 , 3120.0
A ,33,34,35,36
A ,37,38,39,40
ASEL, ALL
! 创建新组件箱盖竖直加强筋
CMSEL, S, CEBI
CMSEL, A, TOP_RIM
CMSEL, A, BOTTOM_RIM
ASEL, INVE
CM, XDJIAQIANGJINs, AREA
ASEL, NONE
K , 65 , -1300.0 , 1000.0 , 3000.0
K , 66 , -1100.0 , -1000.0 , 3000.0
K , 67 , -1100.0 , -1000.0 , 3120.0
K , 68 , -1300.0 , 1000.0 , 3120.0
K , 69 , -800.0 , 1000.0 , 3000.0
K , 70 , -600.0 , -1000.0 , 3000.0
K , 71 , -600.0 , -1000.0 , 3120.0
K , 72 , -800.0 , 1000.0 , 3120.0
K , 73 , -300.0 , 1000.0 , 3000.0
K , 74 , -100.0 , -1000.0 , 3000.0
K , 75 , -100.0 , -1000.0 , 3120.0
K , 76 , -300.0 , 1000.0 , 3120.0
A ,65,66,67,68
A ,69,70,71,72
A ,73,74,75,76
ASEL, ALL
! 创建新组件箱盖斜加强筋
CMSEL, S, CEBI
CMSEL, A, TOP_RIM
CMSEL, A, BOTTOM_RIM
CMSEL, A, XDJIAQIANGJINs
ASEL, INVE
CM, XDJIAQIANGJINx, AREA
ASEL, NONE
